// COMSOL Multiphysics 5.2.0.166 model "PRECOMPUTED.mph"
// Outline of the model tree

Variables
  var1 "Variables 1"
    ep = +0.132/(1+(10^(-5.9)*ec.freq/1[Hz])^2)+0.0643/(1+(10^(-5.32)*ec.freq/1[Hz])^2)+0.103/(1+(10^(-4.74)*ec.freq/1[Hz])^2)+0.0895/(1+(10^(-4.15)*ec.freq/1[Hz])^2)+0.0864/(1+(10^(-3.57)*ec.freq/1[Hz])^2)+0.066/(1+(10^(-2.99)*ec.freq/1[Hz])^2)+0.0299/(1+(10^(-2.41)*ec.freq/1[Hz])^2)+0.025/(1+(10^(-1.83)*ec.freq/1[Hz])^2)+0.0303/(1+(10^(-1.24)*ec.freq/1[Hz])^2)+0.0243/(1+(10^(-0.664)*ec.freq/1[Hz])^2)+0.0225/(1+(10^(-0.0809)*ec.freq/1[Hz])^2)+0.0231/(1+(10^(0.501)*ec.freq/1[Hz])^2)+0.0229/(1+(10^(1.08)*ec.freq/1[Hz])^2)+0.0207/(1+(10^(1.66)*ec.freq/1[Hz])^2)+0.0418/(1+(10^(2.25)*ec.freq/1[Hz])^2)+-0.0184/(1+(10^(2.83)*ec.freq/1[Hz])^2)+0.185/(1+(10^(3.41)*ec.freq/1[Hz])^2)+0.149/(1+(10^(3.99)*ec.freq/1[Hz])^2)+0.549/(1+(10^(4.57)*ec.freq/1[Hz])^2)+0.0629/(1+(10^(5.16)*ec.freq/1[Hz])^2)+0.217/(1+(10^(5.74)*ec.freq/1[Hz])^2)+-0.557/(1+(10^(6.32)*ec.freq/1[Hz])^2)+3.1
    epp = +0.132*(10^(-5.9)*ec.freq/1[Hz])/(1+(10^(-5.9)*ec.freq/1[Hz])^2)+0.0643*(10^(-5.32)*ec.freq/1[Hz])/(1+(10^(-5.32)*ec.freq/1[Hz])^2)+0.103*(10^(-4.74)*ec.freq/1[Hz])/(1+(10^(-4.74)*ec.freq/1[Hz])^2)+0.0895*(10^(-4.15)*ec.freq/1[Hz])/(1+(10^(-4.15)*ec.freq/1[Hz])^2)+0.0864*(10^(-3.57)*ec.freq/1[Hz])/(1+(10^(-3.57)*ec.freq/1[Hz])^2)+0.066*(10^(-2.99)*ec.freq/1[Hz])/(1+(10^(-2.99)*ec.freq/1[Hz])^2)+0.0299*(10^(-2.41)*ec.freq/1[Hz])/(1+(10^(-2.41)*ec.freq/1[Hz])^2)+0.025*(10^(-1.83)*ec.freq/1[Hz])/(1+(10^(-1.83)*ec.freq/1[Hz])^2)+0.0303*(10^(-1.24)*ec.freq/1[Hz])/(1+(10^(-1.24)*ec.freq/1[Hz])^2)+0.0243*(10^(-0.664)*ec.freq/1[Hz])/(1+(10^(-0.664)*ec.freq/1[Hz])^2)+0.0225*(10^(-0.0809)*ec.freq/1[Hz])/(1+(10^(-0.0809)*ec.freq/1[Hz])^2)+0.0231*(10^(0.501)*ec.freq/1[Hz])/(1+(10^(0.501)*ec.freq/1[Hz])^2)+0.0229*(10^(1.08)*ec.freq/1[Hz])/(1+(10^(1.08)*ec.freq/1[Hz])^2)+0.0207*(10^(1.66)*ec.freq/1[Hz])/(1+(10^(1.66)*ec.freq/1[Hz])^2)+0.0418*(10^(2.25)*ec.freq/1[Hz])/(1+(10^(2.25)*ec.freq/1[Hz])^2)+-0.0184*(10^(2.83)*ec.freq/1[Hz])/(1+(10^(2.83)*ec.freq/1[Hz])^2)+0.185*(10^(3.41)*ec.freq/1[Hz])/(1+(10^(3.41)*ec.freq/1[Hz])^2)+0.149*(10^(3.99)*ec.freq/1[Hz])/(1+(10^(3.99)*ec.freq/1[Hz])^2)+0.549*(10^(4.57)*ec.freq/1[Hz])/(1+(10^(4.57)*ec.freq/1[Hz])^2)+0.0629*(10^(5.16)*ec.freq/1[Hz])/(1+(10^(5.16)*ec.freq/1[Hz])^2)+0.217*(10^(5.74)*ec.freq/1[Hz])/(1+(10^(5.74)*ec.freq/1[Hz])^2)+-0.557*(10^(6.32)*ec.freq/1[Hz])/(1+(10^(6.32)*ec.freq/1[Hz])^2)
    epint = +0.132*DS1/(1+(10^(-5.9)*TS1*ec.freq/1[Hz])^2)+0.0643*DS1/(1+(10^(-5.32)*TS1*ec.freq/1[Hz])^2)+0.103*DS1/(1+(10^(-4.74)*TS1*ec.freq/1[Hz])^2)+0.0895*DS1/(1+(10^(-4.15)*TS1*ec.freq/1[Hz])^2)+0.0864*DS1/(1+(10^(-3.57)*TS1*ec.freq/1[Hz])^2)+0.066*DS1/(1+(10^(-2.99)*TS1*ec.freq/1[Hz])^2)+0.0299*DS1/(1+(10^(-2.41)*TS1*ec.freq/1[Hz])^2)+0.025*DS2/(1+(10^(-1.83)*TS2*ec.freq/1[Hz])^2)+0.0303*DS2/(1+(10^(-1.24)*TS2*ec.freq/1[Hz])^2)+0.0243*DS2/(1+(10^(-0.664)*TS2*ec.freq/1[Hz])^2)+0.0225*DS2/(1+(10^(-0.0809)*TS2*ec.freq/1[Hz])^2)+0.0231*DS2/(1+(10^(0.501)*TS2*ec.freq/1[Hz])^2)+0.0229*DS2/(1+(10^(1.08)*TS2*ec.freq/1[Hz])^2)+0.0207*DS2/(1+(10^(1.66)*TS2*ec.freq/1[Hz])^2)+0.0418*DS2/(1+(10^(2.25)*TS2*ec.freq/1[Hz])^2)+-0.0184*DS2/(1+(10^(2.83)*TS2*ec.freq/1[Hz])^2)+0.185*DS2/(1+(10^(3.41)*TS2*ec.freq/1[Hz])^2)+0.149*DS2/(1+(10^(3.99)*TS2*ec.freq/1[Hz])^2)+0.549*DS2/(1+(10^(4.57)*TS2*ec.freq/1[Hz])^2)+0.0629*DS2/(1+(10^(5.16)*TS2*ec.freq/1[Hz])^2)+0.217*DS2/(1+(10^(5.74)*TS2*ec.freq/1[Hz])^2)+-0.557*DS2/(1+(10^(6.32)*TS2*ec.freq/1[Hz])^2)+3.1+const
    eppint = +0.132*DS1*(10^(-5.9)*TS1*ec.freq/1[Hz])/(1+(10^(-5.9)*TS1*ec.freq/1[Hz])^2)+0.0643*DS1*(10^(-5.32)*TS1*ec.freq/1[Hz])/(1+(10^(-5.32)*TS1*ec.freq/1[Hz])^2)+0.103*DS1*(10^(-4.74)*TS1*ec.freq/1[Hz])/(1+(10^(-4.74)*TS1*ec.freq/1[Hz])^2)+0.0895*DS1*(10^(-4.15)*TS1*ec.freq/1[Hz])/(1+(10^(-4.15)*TS1*ec.freq/1[Hz])^2)+0.0864*DS1*(10^(-3.57)*TS1*ec.freq/1[Hz])/(1+(10^(-3.57)*TS1*ec.freq/1[Hz])^2)+0.066*DS1*(10^(-2.99)*TS1*ec.freq/1[Hz])/(1+(10^(-2.99)*TS1*ec.freq/1[Hz])^2)+0.0299*DS1*(10^(-2.41)*TS1*ec.freq/1[Hz])/(1+(10^(-2.41)*TS1*ec.freq/1[Hz])^2)+0.025*DS2*(10^(-1.83)*TS2*ec.freq/1[Hz])/(1+(10^(-1.83)*TS2*ec.freq/1[Hz])^2)+0.0303*DS2*(10^(-1.24)*TS2*ec.freq/1[Hz])/(1+(10^(-1.24)*TS2*ec.freq/1[Hz])^2)+0.0243*DS2*(10^(-0.664)*TS2*ec.freq/1[Hz])/(1+(10^(-0.664)*TS2*ec.freq/1[Hz])^2)+0.0225*DS2*(10^(-0.0809)*TS2*ec.freq/1[Hz])/(1+(10^(-0.0809)*TS2*ec.freq/1[Hz])^2)+0.0231*DS2*(10^(0.501)*TS2*ec.freq/1[Hz])/(1+(10^(0.501)*TS2*ec.freq/1[Hz])^2)+0.0229*DS2*(10^(1.08)*TS2*ec.freq/1[Hz])/(1+(10^(1.08)*TS2*ec.freq/1[Hz])^2)+0.0207*DS2*(10^(1.66)*TS2*ec.freq/1[Hz])/(1+(10^(1.66)*TS2*ec.freq/1[Hz])^2)+0.0418*DS2*(10^(2.25)*TS2*ec.freq/1[Hz])/(1+(10^(2.25)*TS2*ec.freq/1[Hz])^2)+-0.0184*DS2*(10^(2.83)*TS2*ec.freq/1[Hz])/(1+(10^(2.83)*TS2*ec.freq/1[Hz])^2)+0.185*DS2*(10^(3.41)*TS2*ec.freq/1[Hz])/(1+(10^(3.41)*TS2*ec.freq/1[Hz])^2)+0.149*DS2*(10^(3.99)*TS2*ec.freq/1[Hz])/(1+(10^(3.99)*TS2*ec.freq/1[Hz])^2)+0.549*DS2*(10^(4.57)*TS2*ec.freq/1[Hz])/(1+(10^(4.57)*TS2*ec.freq/1[Hz])^2)+0.0629*DS2*(10^(5.16)*TS2*ec.freq/1[Hz])/(1+(10^(5.16)*TS2*ec.freq/1[Hz])^2)+0.217*DS2*(10^(5.74)*TS2*ec.freq/1[Hz])/(1+(10^(5.74)*TS2*ec.freq/1[Hz])^2)+-0.557*DS2*(10^(6.32)*TS2*ec.freq/1[Hz])/(1+(10^(6.32)*TS2*ec.freq/1[Hz])^2)
    TS1 = 0.951
    DS1 = 2.541
    TS2 = 0.0286
    DS2 = 1.098
    const = 1.153

Geometry
  geom1 "Geometry 1" (2D, length unit µm)
    Ellipse1: Ellipse
      pos = {0.117688073394, 0.81104587156}
      rot = 47.4894418710263
      semiaxes = {0.00781636661227, 0.00443815006486}
    Ellipse2: Ellipse
      pos = {0.118136546185, 0.776803212851}
      rot = 59.7434231304
      semiaxes = {0.0063578420733, 0.00525289851095}
    Ellipse3: Ellipse
      pos = {0.133921568627, 0.760921568627}
      rot = 61.3893967789
      semiaxes = {0.00562375887887, 0.00422354539239}
    Ellipse4: Ellipse
      pos = {0.139133903134, 0.615156695157}
      rot = -17.1026889755
      semiaxes = {0.00652171711534, 0.00554616592345}
    Ellipse5: Ellipse
      pos = {0.137116666667, 0.167116666667}
      rot = 55.0078511692
      semiaxes = {0.00595837580297, 0.00518894407975}
    Ellipse6: Ellipse
      pos = {0.139801801802, 0.396756756757}
      rot = 66.801253276
      semiaxes = {0.00686716563447, 0.00409989223331}
    Ellipse7: Ellipse
      pos = {0.146496453901, 0.69390070922}
      rot = -17.1026889755
      semiaxes = {0.00686731776556, 0.00438986613526}
    Ellipse8: Ellipse
      pos = {0.160192307692, 0.152076923077}
      rot = 72.8971005658165
      semiaxes = {0.00621157519091, 0.00534975270968}
    Ellipse9: Ellipse
      pos = {0.161965635739, 0.468302405498}
      rot = 59.7434231304
      semiaxes = {0.00659344821841, 0.00492729526509}
    Ellipse10: Ellipse
      pos = {0.164020833333, 0.607229166667}
      rot = 79.6949671697
      semiaxes = {0.00566507297409, 0.0041399011833}
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    UnionFiller: Union
      input = Ellipse1, Ellipse2, Ellipse3, Ellipse4, Ellipse5, Ellipse6, Ellipse7, Ellipse8, Ellipse9, Ellipse10, Ellipse11, Ellipse12, Ellipse13, Ellipse14, Ellipse15, Ellipse16, Ellipse17, Ellipse18, Ellipse19, Ellipse20, Ellipse21, Ellipse22, Ellipse23, Ellipse24, Ellipse25, Ellipse26, Ellipse27, Ellipse28, Ellipse29, Ellipse30, Ellipse31, Ellipse32, Ellipse33, Ellipse34, Ellipse35, Ellipse36, Ellipse37, Ellipse38, Ellipse39, Ellipse40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
      intbnd = off
      edge = all
    EllipseIF11: Ellipse "Ellipse 11a"
      pos = {0.117688073394, 0.81104587156}
      rot = 47.4894418710263
      semiaxes = {0.0178163666123, 0.0144381500649}
    EllipseIF12: Ellipse "Ellipse 12a"
      pos = {0.118136546185, 0.776803212851}
      rot = 59.7434231304
      semiaxes = {0.0163578420733, 0.015252898511}
    EllipseIF13: Ellipse "Ellipse 13a"
      pos = {0.133921568627, 0.760921568627}
      rot = 61.3893967789
      semiaxes = {0.0156237588789, 0.0142235453924}
    EllipseIF14: Ellipse "Ellipse 14a"
      pos = {0.139133903134, 0.615156695157}
      rot = -17.1026889755
      semiaxes = {0.0165217171153, 0.0155461659234}
    EllipseIF15: Ellipse "Ellipse 15a"
      pos = {0.137116666667, 0.167116666667}
      rot = 55.0078511692
      semiaxes = {0.015958375803, 0.0151889440797}
    EllipseIF16: Ellipse "Ellipse 16a"
      pos = {0.139801801802, 0.396756756757}
      rot = 66.801253276
      semiaxes = {0.0168671656345, 0.0140998922333}
    EllipseIF17: Ellipse "Ellipse 17a"
      pos = {0.146496453901, 0.69390070922}
      rot = -17.1026889755
      semiaxes = {0.0168673177656, 0.0143898661353}
    EllipseIF18: Ellipse "Ellipse 18a"
      pos = {0.160192307692, 0.152076923077}
      rot = 72.8971005658165
      semiaxes = {0.0162115751909, 0.0153497527097}
    EllipseIF19: Ellipse "Ellipse 19a"
      pos = {0.161965635739, 0.468302405498}
      rot = 59.7434231304
      semiaxes = {0.0165934482184, 0.0149272952651}
    EllipseIF110: Ellipse
      pos = {0.164020833333, 0.607229166667}
      rot = 79.6949671697
      semiaxes = {0.0156650729741, 0.0141399011833}
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    UnionLargeEllipse1: Union
      input = EllipseIF11, EllipseIF12, EllipseIF13, EllipseIF14, EllipseIF15, EllipseIF16, EllipseIF17, EllipseIF18, EllipseIF19, EllipseIF110, EllipseIF111, EllipseIF112, EllipseIF113, EllipseIF114, EllipseIF115, EllipseIF116, EllipseIF117, EllipseIF118, EllipseIF119, EllipseIF120, EllipseIF121, EllipseIF122, EllipseIF123, EllipseIF124, EllipseIF125, EllipseIF126, EllipseIF127, EllipseIF128, EllipseIF129, EllipseIF130, EllipseIF131, EllipseIF132, EllipseIF133, EllipseIF134, EllipseIF135, EllipseIF136, EllipseIF137, EllipseIF138, EllipseIF139, EllipseIF140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
      intbnd = off
      edge = all
    DiffInterface1: Difference | input = UnionLargeEllipse1; input2 = UnionFiller; keep = on; intbnd = off; edge = all
    EllipseIF21: Ellipse "Ellipse 21a"
      pos = {0.117688073394, 0.81104587156}
      rot = 47.4894418710263
      semiaxes = {0.0578163666123, 0.0544381500649}
    EllipseIF22: Ellipse "Ellipse 22a"
      pos = {0.118136546185, 0.776803212851}
      rot = 59.7434231304
      semiaxes = {0.0563578420733, 0.055252898511}
    EllipseIF23: Ellipse "Ellipse 23a"
      pos = {0.133921568627, 0.760921568627}
      rot = 61.3893967789
      semiaxes = {0.0556237588789, 0.0542235453924}
    EllipseIF24: Ellipse "Ellipse 24a"
      pos = {0.139133903134, 0.615156695157}
      rot = -17.1026889755
      semiaxes = {0.0565217171153, 0.0555461659234}
    EllipseIF25: Ellipse "Ellipse 25a"
      pos = {0.137116666667, 0.167116666667}
      rot = 55.0078511692
      semiaxes = {0.055958375803, 0.0551889440797}
    EllipseIF26: Ellipse "Ellipse 26a"
      pos = {0.139801801802, 0.396756756757}
      rot = 66.801253276
      semiaxes = {0.0568671656345, 0.0540998922333}
    EllipseIF27: Ellipse "Ellipse 27a"
      pos = {0.146496453901, 0.69390070922}
      rot = -17.1026889755
      semiaxes = {0.0568673177656, 0.0543898661353}
    EllipseIF28: Ellipse "Ellipse 28a"
      pos = {0.160192307692, 0.152076923077}
      rot = 72.8971005658165
      semiaxes = {0.0562115751909, 0.0553497527097}
    EllipseIF29: Ellipse "Ellipse 29a"
      pos = {0.161965635739, 0.468302405498}
      rot = 59.7434231304
      semiaxes = {0.0565934482184, 0.0549272952651}
    EllipseIF210: Ellipse
      pos = {0.164020833333, 0.607229166667}
      rot = 79.6949671697
      semiaxes = {0.0556650729741, 0.0541399011833}
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    UnionLargeEllipse2: Union
      input = EllipseIF21, EllipseIF22, EllipseIF23, EllipseIF24, EllipseIF25, EllipseIF26, EllipseIF27, EllipseIF28, EllipseIF29, EllipseIF210, EllipseIF211, EllipseIF212, EllipseIF213, EllipseIF214, EllipseIF215, EllipseIF216, EllipseIF217, EllipseIF218, EllipseIF219, EllipseIF220, EllipseIF221, EllipseIF222, EllipseIF223, EllipseIF224, EllipseIF225, EllipseIF226, EllipseIF227, EllipseIF228, EllipseIF229, EllipseIF230, EllipseIF231, EllipseIF232, EllipseIF233, EllipseIF234, EllipseIF235, EllipseIF236, EllipseIF237, EllipseIF238, EllipseIF239, EllipseIF240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
      intbnd = off
      edge = all
    DiffInterface2: Difference
      input = UnionLargeEllipse2
      input2 = UnionLargeEllipse1
      keep = on
      intbnd = off
      edge = all
    RectBlock: Rectangle | size = {1, 1}
    DiffMatrix: Difference | input = RectBlock; input2 = UnionLargeEllipse2; keep = on
    fin: Finalize "Form Union"

Materials
  mat1: Common "Material 1" on selection geom1_UnionFiller_dom
    def "Basic"
      electricconductivity = 1.0E-15
      relpermittivity = 3.9
  mat2: Common "Material 2" on selection geom1_DiffMatrix_dom
    def "Basic"
      relpermittivity = ep-j*epp
      electricconductivity = 1.0E-15
  mat4: Common "Material 4" on selection geom1_DiffInterface1_dom
    def "Basic"
      relpermittivity = 1-j*0.01
      electricconductivity = 1.0E-15
  mat5: Common "Material 5" on selection geom1_DiffInterface2_dom
    def "Basic"
      relpermittivity = epint-j*eppint
      electricconductivity = 1.0E-15

Physics
  ec: ConductiveMedia "Electric Currents" on all domains
    dependent variable V
    cucn1: CurrentConservation (default)
    ein1: ElectricInsulation (default)
    init1: init "Initial Values 1" (default) | V = 1.0E-5
    pc1: PeriodicCondition on boundaries 1, 4
    gnd1: Ground on boundaries 3
    term1: Terminal on boundaries 2 | TerminalType = Voltage; V0 = 0.0015

Mesh
  mesh1 "Mesh 1" (physics-controlled)
    size: MeshSizeDefault | hauto = 5

Studies
  std1 "Study 1"
    freq: Frequency "Frequency Domain"
      punit = Hz
      plist = {0.001, 0.00158489319246, 0.00251188643151, 0.00398107170553, 0.0063095734448, 0.01, 0.0158489319246, 0.0251188643151, 0.0398107170553, 0.063095734448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}
      physselection = ec